# Input written to comply with LAMMPS 2017-08-11 00:00:00

# Atomic Configuration
units           metal
boundary        p p p
box tilt large
atom_style      charge
read_data       na3ocl_mg_centred.lmp

# Potential Setup
pair_style  buck/coul/long 12.0
pair_coeff * * 0.0 1.0 0.0
pair_coeff 2 2    1788.190000  0.159000   0.000000 # Na Na
pair_coeff 2 4    1170.410000  0.315000   0.000000 # Na Cl
pair_coeff 2 3     588.380000  0.338000   0.000000 # Na O
pair_coeff 4 4    1227.200000  0.321000  14.530000 # Cl Cl
pair_coeff 3 4    8286.910000  0.259000  62.200000 # Cl O
pair_coeff 3 3   22764.300000  0.149000  13.190000 # O  O
pair_coeff 1 3    1428.500000  0.294500   0.000000 # O Mg
pair_coeff 1 4    4914.540000  0.257000   0.000000 # Cl Mg
kspace_style pppm 1e-05

# General Setup
timestep        0.001

# Thermodynamic Information Output
thermo_style custom step temp epair emol etotal press lx ly lz fmax cpu cpuremain
thermo          1000

# Intial Atom Velocity
velocity all create 900 80800 dist gaussian rot yes

# Stage 0: npt_equilibriation
restart         0
fix             int all npt aniso 1.0 1.0 0.1 temp 900 900 0.5
run             50000

# Stage 1: nvt_equilibriation
unfix int
restart         0
fix             int all nvt temp 900 900 0.5
run             50000

# Stage 2: main_nvt_simulation
unfix int
dump     atom_info all custom 1000 mg.lammpstrj element x y z q id type vx vy vz
dump_modify     atom_info append yes
dump_modify     atom_info sort id
dump_modify     atom_info element Mg Na O Cl
restart         0
fix             int all nvt temp 900 900 0.5
run             2000000

# Final Commands
variable final_energy equal etotal
print "final_energy: ${final_energy}"
print "END_OF_COMP"
